# 64-atom diamond-Si NVE molecular dynamics

variable dt index 0.001
variable direct_plugin index ../../direct/build/tersoffnndirectplugin.so

units metal
dimension 3
boundary p p p
atom_style atomic

plugin load ${direct_plugin}

lattice diamond 5.431
region box block 0 2 0 2 0 2
create_box 1 box
create_atoms 1 box
mass 1 28.0855

pair_style tersoff_nn_direct model_name ../../models/JSAP_autumn_2026/model_direct.txt input_stats ../../models/JSAP_autumn_2026/input_stats.csv use_gpu no
pair_coeff * * ../../models/JSAP_autumn_2026/Si.tersoff Si_NN

neighbor 2.0 bin
neigh_modify every 1 delay 0 check yes

velocity all create 300.0 4928459 mom yes rot no dist gaussian
fix integrate all nve

timestep ${dt}
thermo 10
thermo_style custom step time etotal
thermo_modify format float %.15g
run 1000
